<?xml version="1.0" encoding="ISO-8859-1"?>
<neuroml xmlns="http://www.neuroml.org/schema/neuroml2" xmlns:xsi="http://www.w3.org/2001/XMLSchema-instance" xsi:schemaLocation="http://www.neuroml.org/schema/neuroml2  http://neuroml.svn.sourceforge.net/viewvc/neuroml/NeuroML2/Schemas/NeuroML2/NeuroML_v2alpha.xsd" id="LeakConductance_bask">

    <notes>NeuroML file containing a single Channel description</notes>

    <ionChannel id="LeakConductance_bask" conductance="10pS" type="ionChannelPassive">

        <notes>Passive conductance for basket cell</notes>

    </ionChannel>

</neuroml>
